// SBML level 3 version 2

model biocrnpyler_990014()
  // model units - substance: mole, time: second, volume: litre, area: square_metre, length: metre, extent: mole

  // Compartments:
  compartment default = 1e-6;

  // Species:
  species dna_dna_Terminator_ConstituitivePromoter_forward_dna_Terminator_ConstituitivePromoter_forward_dna_RBS_forward_dna_RBS_forward_dna_CDS_forward_dna_RBS_forward_dna_CDS_forward_circular_ in default = 0;
  species rna_rna_RBS_forward_rna_RBS_forward_rna_CDS_forward_rna_RBS_forward_rna_CDS_forward_rna_Terminator_ConstituitivePromoter_forward_ in default = 0;
  species protein_RBS in default = 0;
  species protein_mCherry in default = 0;
  species protein_sfGFP in default = 0;

  // Parameters:
  ktx__simple_transcription = 0.1;
  ktl__simple_translation = 0.25;
  kdil__ = 0.001;
  kdil__rna_degredation = 0.001;

  // Reactions:
  r0: dna_dna_Terminator_ConstituitivePromoter_forward_dna_Terminator_ConstituitivePromoter_forward_dna_RBS_forward_dna_RBS_forward_dna_CDS_forward_dna_RBS_forward_dna_CDS_forward_circular_ => dna_dna_Terminator_ConstituitivePromoter_forward_dna_Terminator_ConstituitivePromoter_forward_dna_RBS_forward_dna_RBS_forward_dna_CDS_forward_dna_RBS_forward_dna_CDS_forward_circular_ + rna_rna_RBS_forward_rna_RBS_forward_rna_CDS_forward_rna_RBS_forward_rna_CDS_forward_rna_Terminator_ConstituitivePromoter_forward_; ktx__simple_transcription*dna_dna_Terminator_ConstituitivePromoter_forward_dna_Terminator_ConstituitivePromoter_forward_dna_RBS_forward_dna_RBS_forward_dna_CDS_forward_dna_RBS_forward_dna_CDS_forward_circular_;
  r1: rna_rna_RBS_forward_rna_RBS_forward_rna_CDS_forward_rna_RBS_forward_rna_CDS_forward_rna_Terminator_ConstituitivePromoter_forward_ => rna_rna_RBS_forward_rna_RBS_forward_rna_CDS_forward_rna_RBS_forward_rna_CDS_forward_rna_Terminator_ConstituitivePromoter_forward_ + protein_mCherry; ktl__simple_translation*rna_rna_RBS_forward_rna_RBS_forward_rna_CDS_forward_rna_RBS_forward_rna_CDS_forward_rna_Terminator_ConstituitivePromoter_forward_;
  r2: rna_rna_RBS_forward_rna_RBS_forward_rna_CDS_forward_rna_RBS_forward_rna_CDS_forward_rna_Terminator_ConstituitivePromoter_forward_ => rna_rna_RBS_forward_rna_RBS_forward_rna_CDS_forward_rna_RBS_forward_rna_CDS_forward_rna_Terminator_ConstituitivePromoter_forward_ + protein_sfGFP; ktl__simple_translation*rna_rna_RBS_forward_rna_RBS_forward_rna_CDS_forward_rna_RBS_forward_rna_CDS_forward_rna_Terminator_ConstituitivePromoter_forward_;
  r3: rna_rna_RBS_forward_rna_RBS_forward_rna_CDS_forward_rna_RBS_forward_rna_CDS_forward_rna_Terminator_ConstituitivePromoter_forward_ => ; kdil__*rna_rna_RBS_forward_rna_RBS_forward_rna_CDS_forward_rna_RBS_forward_rna_CDS_forward_rna_Terminator_ConstituitivePromoter_forward_;
  r4: protein_RBS => ; kdil__*protein_RBS;
  r5: protein_mCherry => ; kdil__*protein_mCherry;
  r6: protein_sfGFP => ; kdil__*protein_sfGFP;
  r7: rna_rna_RBS_forward_rna_RBS_forward_rna_CDS_forward_rna_RBS_forward_rna_CDS_forward_rna_Terminator_ConstituitivePromoter_forward_ => ; kdil__rna_degredation*rna_rna_RBS_forward_rna_RBS_forward_rna_CDS_forward_rna_RBS_forward_rna_CDS_forward_rna_Terminator_ConstituitivePromoter_forward_;

  // Unit definitions:
  unit square_metre = metre^2;
end
